# First Pass. This did not work
T_in := 70 °F
T_out := 160 °F
Delta_T := T_out - T_in = 90 Δ°F
Heat_input := 40000 BTU/hr
ρ := 8.154242 lbm/gal
η := 78%
C_p := 1.00124 BTU/(Δ°F*lbm)
A := (Heat_input*η) = 31200 BTU/hr
B := Delta_T*ρ = 733.882 Δ°F*lbm/gal
Rate := A/B*1/C_p = 0.707683 gal/min
# Second Pass: Gas Thermal
T_inlet := 70.3 °F
T_outlet := 155 °F
T_rise := T_outlet - T_inlet = 84.7 Δ°F
Heat_input := 37377.6 BTU/hr
C_p := 1.00058 BTU/(Δ°F*lbm)
Heating_Value := 1016 BTU/ft^3
Gas_corr_used := 0.11 ft^3
ρ_outlet := 8.16743 lbm/gal
Electric_used := 0 W*hr
Gallons_water_used := 0.13 gal
Weight_water := Gallons_water_used*ρ_outlet = 1.06177 lbm
Heat_absorbed := (Weight_water*C_p*T_rise) = 89.9837 BTU
Heat_used := (Gas_corr_used*Heating_Value) + Electric_used = 111.76 BTU
η := Heat_absorbed/Heat_used = 0.805152
A := (Heat_input*η) = 30094.6 BTU/hr
B := T_rise*ρ_outlet = 691.781 Δ°F*lbm/gal
Rate := A/B*1/C_p = 0.724631 gal/min
